// COMSOL Multiphysics 6.2.0.260 model "double_pipe_heat_exchanger_preset.mph"
// Parameterized Double-Pipe Heat Exchanger, Preset Model
// This is a template MPH-file containing the physics interfaces and the parameterized geometry for the model Double-Pipe Heat Exchanger.
// Outline of the model tree

Parameters
  T_hot = 130[degC]  // Engine oil temperature
  T_cold = 60[degC]  // Transformer oil temperature
  v_hot = 0.09[m/s]  // Engine oil inlet velocity
  v_cold = 0.205[m/s]  // Transformer oil inlet velocity

Selections
  sel1: Explicit "Inner Pipe" on domains 2
  adj1: Adjacent "Inner Pipe, Boundaries" | entitydim = 3; input = {sel1}; outputdim = 2
  sel2: Explicit "Inner Pipe, Inlet" on boundaries 28
  sel3: Explicit "Inner Pipe, Outlet" on boundaries 27
  com1: Complement "Outer Pipe" | entitydim = 3; input = {sel1}
  adj2: Adjacent "Outer Pipe, Boundaries" | entitydim = 3; input = {com1}; outputdim = 2
  sel4: Explicit "Outer Pipe, Inlet" on boundaries 17
  sel5: Explicit "Outer Pipe, Outlet" on boundaries 20
  int1: Intersection "Interior Walls" | entitydim = 2; input = {adj1, adj2}
  dif1: Difference "Steel Walls" | entitydim = 2; add = {adj1, adj2}; subtract = {sel2, sel3, sel4, sel5}

Geometry
  geom1 "Geometry 1" (3D, length unit m)
    imp1: Import
      type = native
      filename = double_pipe_heat_exchanger.mphbin
      meshfilename = double_pipe_heat_exchanger.mphbin
    fin: Finalize "Form Union"

Materials
  mat1: Common "Engine oil" on selection com1
    def "Basic"
      dynamicviscosity = eta(T)
      heatcapacity = Cp(T)
      density = rho(T)
      thermalconductivity = k(T)
      eta: Piecewise
        arg = T
        pieces = 
          {273.0, 353.0, 42669.28688622-741.1718801282*T^1+5.360521287088*T^2-0.0206602767616*T^3+4.47491538052E-5*T^4-5.164053479202E-8*T^5+2.48033770504E-11*T^6}
          {353.0, 433.0, 4.94593941-0.0351869631*T^1+8.37935977E-5*T^2-6.67125E-8*T^3}
        argunit = K
        fununit = Pa*s
      Cp: Piecewise | arg = T; pieces = {273.0, 433.0, 761.405625+3.47685606*T^1+0.00115530303*T^2}; argunit = K; fununit = J/(kg*K)
      rho: Piecewise | arg = T; pieces = {273.0, 433.0, 1068.70404-0.6393421*T^1+7.34307359E-5*T^2}; argunit = K; fununit = kg/m^3
      k: Piecewise | arg = T; pieces = {273.0, 433.0, 0.192223542-2.0637987E-4*T^1+1.54220779E-7*T^2}; argunit = K; fununit = W/(m*K)
  mat2: Common "Transformer oil" on selection sel1
    def "Basic"
      dynamicviscosity = eta(T)
      heatcapacity = Cp(T)
      density = rho(T)
      thermalconductivity = k(T)
      eta: Piecewise
        arg = T
        pieces = 
          {243.0, 273.0, 4492.20229-64.7408879*T^1+0.349900959*T^2-8.40477E-4*T^3+7.57041667E-7*T^4}
          {273.0, 373.0, 91.4524999-1.33227058*T^1+0.00777680216*T^2-2.27271368E-5*T^3+3.32419673E-8*T^4-1.94631023E-11*T^5}
        argunit = K
        fununit = Pa*s
      Cp: Piecewise
        arg = T
        pieces = 
          {223.0, 293.0, -117056.38+1816.76208*T^1-10.305786*T^2+0.0256691919*T^3-2.36742424E-5*T^4}
          {293.0, 373.0, -13408.1491+123.044152*T^1-0.335401786*T^2+3.125E-4*T^3}
        argunit = K
        fununit = J/(kg*K)
      rho: Piecewise | arg = T; pieces = {223.0, 373.0, 1055.04607-0.581753034*T^1-6.40531689E-5*T^2}; argunit = K; fununit = kg/m^3
      k: Piecewise | arg = T; pieces = {223.0, 373.0, 0.134299084-8.04973822E-5*T^1}; argunit = K; fununit = W/(m*K)
  mat3: Common "Steel AISI 4340" on selection dif1
    def "Basic"
      relpermeability = 1
      electricconductivity = 4.032e6[S/m]
      thermalexpansioncoefficient = 12.3e-6[1/K]
      heatcapacity = 475[J/(kg*K)]
      relpermittivity = 1
      density = 7850[kg/m^3]
      thermalconductivity = 44.5[W/(m*K)]
    Enu "Young's modulus and Poisson's ratio"
      E = 205[GPa]
      nu = 0.28
    shell
      lth = 7[mm]
      lrot = 0.0
      lne = 2

Physics
  spf: LaminarFlow on all domains
    dependent variable u = {u, v, w}
    PhysicalModelProperty.Compressibility = CompressibleMALT03
    AdvancedSettingProperty.UsePseudoTime = 1
    fp1: FluidProperties (default)
    init1: init "Initial Values 1" (default)
    wallbc1: WallBC "Wall 1" (default)
    inl1: InletBoundary "Inlet 1: Transformer Oil" on selection sel2
      BoundaryCondition = FullyDevelopedFlow
      Uavfdf = v_cold
    out1: OutletBoundary "Outlet 1: Transformer Oil" on selection sel3
    inl2: InletBoundary "Inlet 2: Engine Oil" on selection sel4 | BoundaryCondition = FullyDevelopedFlow; Uavfdf = v_hot
    out2: OutletBoundary "Outlet 2: Engine Oil" on selection sel5
    iwbc1: InteriorWallBC "Interior Wall 1" on selection int1
  ht: HeatTransferInFluids on all domains
    dependent variable T
    ShapeProperty.order_temperature = 1
    fluid1: FluidHeatTransferModel "Fluid 1" (default)
    init1: init "Initial Values 1" (default) | Tinit = (T_cold+T_hot)/2
    ins1: ThermalInsulation (default)
    ifl1: Inflow "Inflow 1: Transformer Oil" on selection sel2 | Tustr = T_cold
    ofl1: ConvectiveOutflow "Outflow 1: Transformer Oil" on selection sel3
    ifl2: Inflow "Inflow 2: Engine Oil" on selection sel4 | Tustr = T_hot
    ofl2: ConvectiveOutflow "Outflow 2: Engine Oil" on selection sel5
    sls1: SolidLayeredShell "Thin Layer 1" on selection dif1 | LayerType = Conductive
      ins1: ThermalInsulation (default)

Multiphysics
  nitf1: NonIsothermalFlow on all domains | Fluid_physics = spf; Heat_physics = ht

Mesh
  mesh1 "Mesh 1" (physics-controlled)

Studies
  std1 "Study 1"
    stat: Stationary